a := 0
b := 10
h := 0.1
y_a(x) := x^2
f_2(x) := x*cos(x)^2
x := a, a + h .. b
# [plot: y_a(x), f_2(x) vs x]
# [plot: y_a(x), y_a(z), y_a(t) vs x, z, t]
z := a, a + 3 .. b
t := [0; 2; 4; 6; 8; 10]
integral(y_a(u), u) → u^3/3
integral(f_2(u), u) → (u*sin(2*u) + cos(u)^2 + u^2)/4
d/du(y_a(u)) → 2*u
∂/∂u(f_2(u)) → -(2*u*cos(u)*sin(u)) + cos(u)^2
Y(u, v) := y_a(u) + f_2(v)
Y(u, v) → v*cos(v)^2 + u^2
# [3D plot: Y]
# [contour plot: Y]
