k := 1
n := 3
A := [13, 0.6, -2, 0.5, 2; 6, 23, 3, 1, 3; 3, 0.75, 25, 0.25, 0; -1, 2, 3, 3, 1; 1/3, 3, -5, 2, 30]
B := [-1; 15; -20; 3; 7]
|A| = 640459
D := augment(A, B)
rank(A) = 5
rank(D) = 5
D = [
    13, 0.6, -2, 0.5, 2, -1;
    6, 23, 3, 1, 3, 15;
    3, 0.75, 25, 0.25, 0, -20;
    -1, 2, 3, 3, 1, 3;
    0.333333, 3, -5, 2, 30, 7
]
X_xd := lsolve(A, B)
X_cd := A^-1*B
Δ := |A|
X_xd = [-0.274359; 0.783263; -0.802652; 1.20777; -0.056238]
X_cd = [-0.274359; 0.783263; -0.802652; 1.20777; -0.056238]
A*X_xd - B = [-4.44089e-16; 1.77636e-15; -3.55271e-15; 4.44089e-16; -1.77636e-15]
A*X_cd - B = [2.22045e-16; 1.77636e-15; -3.55271e-15; -4.44089e-16; -8.88178e-16]
A_0 := A
A_0[:, 0] := B
x_0 := |A_0|/Δ
x_0 = -0.274359
A_1 := A
A_1[:, 1] := B
x_1 := |A_1|/Δ
x_1 = 0.783263
A_2 := A
A_2[:, 2] := B
x_2 := |A_2|/Δ
x_2 = -0.802652
A_3 := A
A_3[:, 3] := B
x_3 := |A_3|/Δ
x_3 = 1.20777
A_4 := A
A_4[:, 4] := B
x_4 := |A_4|/Δ
x_4 = -0.056238
X_kr := [x_0; x_1; x_2; x_3; x_4]
X_kr = [-0.274359; 0.783263; -0.802652; 1.20777; -0.056238]
A*X_kr - B = [-6.66134e-16; 0; -7.10543e-15; 0; -1.77636e-15]
D_gs := rref(D)
D_gs[:, 5] = [-0.274359; 0.783263; -0.802652; 1.20777; -0.056238]
A*D_gs[:, 5] - B = [-2.22045e-16; 0; -7.10543e-15; 0; -1.77636e-15]
solve block
    # guess values
    y_0 := 0
    y_1 := 0
    y_2 := 0
    y_3 := 0
    y_4 := 0
    # constraints
    A*[y_0; y_1; y_2; y_3; y_4] == B
    # solver
    X_sb := find(y_0, y_1, y_2, y_3, y_4)
end solve block
X_sb = [-0.274359; 0.783263; -0.802652; 1.20777; -0.056238]
A*X_sb - B = [1.11022e-16; 1.77636e-15; 0; 0; -1.77636e-15]
i := 0 .. 4
j := 0 .. 4
α = 0.00729735
α[i, j] := if(i == j, 0, -A[i, j]/A[i, i])
β[i] := B[i]/A[i, i]
β = [-0.0769231; 0.652174; -0.8; 1; 0.233333]
norm1(α) = 1.45095
normi(α) = 2.33333
norme(α) = 1.37089
x_0 := β
x_1 := α*x_0 + β
x_2 := α*x_1 + β
x_3 := α*x_2 + β
x_4 := α*x_3 + β
x_5 := α*x_4 + β
x_5 = [-0.274575; 0.782766; -0.802825; 1.20654; -0.0564398]
