a := -1
b := 1
f(x) := acos(2*x) - sin(x)
# [plot: f(x) vs x]
a_1 := 0.453
b_1 := 0.453
x_r := root(f(a_1), a_1)
x_r = 0.452892
f_1(x) := acos(2*x)
f_2(x) := sin(x)
# [plot: f_1(x), f_2(x) vs x]
a_2 := 0.4
b_2 := 0.5
f(a_2) = 0.254083
f(b_2) = -0.479426
f(a_2)*f(b_2) = -0.121814
solve block
    # guess values
    x := 0.45
    # constraints
    f(x) == 0
    # solver
    x_wa := Find(x)
end solve block
x_wa = 0.452892
a_0 := 0.4
b_0 := 0.5
x_0 := (a_0 + b_0)/2 = 0.45
f(x_0) = 0.0160613
a_3 := x_0
b_3 := b_0
x_1 := (a_3 + b_3)/2 = 0.475
df(x) := d/dx(f(x))
x_c0 := 0.4
x_n0 := 0.4
b_c := 0.5
x_n1 := x_n0 - f(x_n0)/df(x_n0) = 0.459722
x_c1 := x_c0 - f(x_c0)*(b_c - x_c0)/(f(b_c) - f(x_c0)) = 0.434639
x_n2 := x_n1 - f(x_n1)/df(x_n1) = 0.453108
x_c2 := x_c1 - f(x_c1)*(b_c - x_c1)/(f(b_c) - f(x_c1)) = 0.445541
a_6 := 0.5
a_5 := 0.25
a_4 := 1.5
a_3 := -0.75
a_2 := 2
a_1 := -1
a_0 := 0.5
v := [0.5; -1; 2; -0.75; 1.5; 0.25; 0.5]
r := polyroots(v)
x := 0.2
y := 2
log(x) + 2*log(y) == 0
y^2 + 36*x == 13
solve block
    # solver
    wa := Find(x, y)
    wa = [0.2; 2]
end solve block
r = [-0.78354 + 1.55569i; -0.78354 - 1.55569i; 0.201223 - 1.00949i; 0.201223 + 1.00949i; 0.332317 - 0.447914i; 0.332317 + 0.447914i]
